// COMSOL Multiphysics 6.2.0.415 model "Optimization_MP_Chitosan_PCL.mph"
// Outline of the model tree

Parameters
  r_chitosan = 5.1 [um]  // Ch radius in MP
  c_arbitrary = 1 [mol/m^3]  // Arbitrary initial conc.
  Meshmax = 0.1 [mm]  // Mesh maximum size
  Meshmin = 2.4e-5 [mm]  // Mesh minimum size
  MW_BSA = 66000 [g/mol]  // Molecular weight of BSA
  D_chitosan = 1.16e-14[cm^2/s]  // Ch diff. coefficient
  r_ch_pcl = 6.35 [um]  // Ch-PCL radius in MP
  D_PCL = 2.3e-19[m^2/s]  // PCL diff. coeff. init. guess
  burst = 7  // Established burst release
  k = 1  // Partition coefficient

Variables
  var1 "Variables 1"
    mass_drug = intop1(c_BSA*MW_BSA)
    mass_init = withsol('sol1',intop1(c_BSA)*MW_BSA,setval(t,0))

Couplings
  intop1: Integration on domains 1, 2 | axisym = on

Geometry
  geom1 "Geometry 1" (2D axisymmetric, length unit µm)
    c1: Circle | r = r_chitosan
    c2: Circle | r = r_ch_pcl
    fin: Finalize "Form Union"

Physics
  tds: DilutedSpecies "Transport of Diluted Species" on all domains
    dependent variable c_BSA
    TransportMechanism.Convection = 0
    cdm1: ConvectionDiffusionMigration "Transport Properties 1" (default) | D_c_BSA = D_chitosan
    axi1: AxialSymmetry (default)
    nflx1: NoFlux (default)
    init1: init "Initial Values 1" (default) | initc = c_arbitrary
    conc1: Concentration on boundaries 4, 7 | species = 1
    init2: init "Initial Values 2" on domains 1
    cdm2: ConvectionDiffusionMigration "Transport Properties 2" on domains 1 | D_c_BSA = D_PCL
    pac1: PartitionCondition on boundaries 5, 6 | ReverseDirection = 1; K = k
  opt: GeneralOptimization on no domains
    glsobj1: GlobalLeastSquaresObjective
      fileName = C:UsersechacinrOneDrive - University at BuffaloDocumentsEduardoChacinFirstSemesterResearchEye Drug DeliveryCOMSOL SimulationsDr. Swindle-Reilly DDSsMicroparticlesChitosan-PCLBSA_Experimental_data_MPs_Chitosan-PCL.csv
      t1: TimeColumn
      v1: ValueColumn | columnExpression = (burst+(100-burst)*(1-mass_drug/mass_init))

Mesh
  mesh1 "Mesh 1"
    size: MeshSizeDefault | hmax = 0.851; hmin = 0.00381; hcurve = 0.3; hgrad = 1.3
    size1: Size on entire geometry | hmax = Meshmax; hmin = Meshmin; hnarrow = 100; custom = on
    ftri1: FreeTri "Free Triangular 1" on remaining entities

Studies
  std1 "Study 1"
    opt: Optimization
      optsolver = coordsearch
      opttol = 0.001
      optobj = comp1.opt.glsobj1
      descr = Least-squares objective value
      initval = {20, 4.08e-15[cm^2/s], 5.79e-13[cm^2/s], 0.84}
      scale = {10, 1e-14[cm^2/s], 5e-13[cm^2/s], 1}
      lbound = {0, 1e-15[cm^2/s], 1e-15[cm^2/s], 0.1}
      ubound = {100, 1e-13[cm^2/s], 5e-11[cm^2/s], 10}
      pname = {burst, D_chitosan, D_PCL, k}
    time: Transient "Time Dependent" | tlist = range(0,155520,15552000)

Solver configurations
  sol1 "Solution 1" (study std1)
    v1: Variables "Dependent Variables 1"
    t1: Time "Time-Dependent Solver 1"
      tlist = range(0,155520,15552000)
      rtol = 0.005
      maxorder = 2
      stabcntrl = on
      tlistlsq = {3600, 10800, 21600, 43200, 86400, 259200, 604800, 1209600, 2419200, 7257600, 14515200}
      lsqtimesout = 3.60e+03 1.08e+04 2.16e+04 4.32e+04 8.64e+04 2.59e+05 6.05e+05 1.21e+06 2.42e+06 7.26e+06 1.45e+07
      fc1: FullyCoupled
        linsolver = d1
        maxiter = 8
        damp = 0.9
        jtech = once
        stabacc = aacc
        aaccdim = 5
        aaccmix = 0.9
        aaccdelay = 1
      d1: Direct "Direct, concentrations (tds)" | linsolver = pardiso; pivotperturb = 1.0E-13